<neuroml xmlns="http://www.neuroml.org/schema/neuroml2"  xmlns:xs="http://www.w3.org/2001/XMLSchema" xmlns:xsi="http://www.w3.org/2001/XMLSchema-instance" xsi:schemaLocation="http://www.neuroml.org/schema/neuroml2 https://raw.github.com/NeuroML/NeuroML2/development/Schemas/NeuroML2/NeuroML_v2beta5.xsd" id="RandomPopulation">
    <silentSynapse id="silent1"/>
    <pulseGenerator id="baseline_e" delay="0ms" duration="300ms" amplitude="147.2512 pA"/>
    <pulseGenerator id="baseline_pv" delay="0ms" duration="300ms" amplitude="386.7281 pA"/>
    <pulseGenerator id="baseline_sst" delay="0ms" duration="300ms" amplitude="40.2657 pA"/>
    <pulseGenerator id="baseline_vip" delay="0ms" duration="300ms" amplitude="98.4368 pA"/>
    <pulseGenerator id="modVIP" delay="100ms" duration="200ms" amplitude="10 pA"/>
    <network id="net2">
        <population id="ePop" component="E" size="200"/>
        <population id="pvPop" component="PV" size="25"/>
        <population id="sstPop" component="SST" size="12"/>
        <population id="vipPop" component="VIP" size="12"/>
        <continuousProjection id="e_e" presynapticPopulation="ePop" postsynapticPopulation="ePop">
            <continuousConnectionInstanceW id="0" preCell="../ePop[0]" preSegment="0" preFractionAlong="0.5" postCell="../ePop[19]" postSegment="0" postFractionAlong="0.5" preComponent="silent1" postComponent="rs" weight="0.605"/>
            <continuousConnectionInstanceW id="1" preCell="../ePop[0]" preSegment="0" preFractionAlong="0.5" postCell="../ePop[100]" postSegment="0" postFractionAlong="0.5" preComponent="silent1" postComponent="rs" weight="0.605"/>
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        </continuousProjection>
        <continuousProjection id="e_pv" presynapticPopulation="ePop" postsynapticPopulation="pvPop">
            <continuousConnectionInstanceW id="0" preCell="../ePop[1]" preSegment="0" preFractionAlong="0.5" postCell="../pvPop[6]" postSegment="0" postFractionAlong="0.5" preComponent="silent1" postComponent="rs" weight="1.485"/>
            <continuousConnectionInstanceW id="1" preCell="../ePop[8]" preSegment="0" preFractionAlong="0.5" postCell="../pvPop[0]" postSegment="0" postFractionAlong="0.5" preComponent="silent1" postComponent="rs" weight="1.485"/>
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        </continuousProjection>
        <continuousProjection id="e_sst" presynapticPopulation="ePop" postsynapticPopulation="sstPop">
            <continuousConnectionInstanceW id="0" preCell="../ePop[19]" preSegment="0" preFractionAlong="0.5" postCell="../sstPop[4]" postSegment="0" postFractionAlong="0.5" preComponent="silent1" postComponent="rs" weight="2.32"/>
            <continuousConnectionInstanceW id="1" preCell="../ePop[20]" preSegment="0" preFractionAlong="0.5" postCell="../sstPop[2]" postSegment="0" postFractionAlong="0.5" preComponent="silent1" postComponent="rs" weight="2.32"/>
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        </continuousProjection>
        <continuousProjection id="e_vip" presynapticPopulation="ePop" postsynapticPopulation="vipPop">
            <continuousConnectionInstanceW id="0" preCell="../ePop[3]" preSegment="0" preFractionAlong="0.5" postCell="../vipPop[7]" postSegment="0" postFractionAlong="0.5" preComponent="silent1" postComponent="rs" weight="0.355"/>
            <continuousConnectionInstanceW id="1" preCell="../ePop[5]" preSegment="0" preFractionAlong="0.5" postCell="../vipPop[8]" postSegment="0" postFractionAlong="0.5" preComponent="silent1" postComponent="rs" weight="0.355"/>
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        </continuousProjection>
        <continuousProjection id="pv_e" presynapticPopulation="pvPop" postsynapticPopulation="ePop">
            <continuousConnectionInstanceW id="0" preCell="../pvPop[0]" preSegment="0" preFractionAlong="0.5" postCell="../ePop[0]" postSegment="0" postFractionAlong="0.5" preComponent="silent1" postComponent="rs" weight="-0.00132"/>
            <continuousConnectionInstanceW id="1" preCell="../pvPop[0]" preSegment="0" preFractionAlong="0.5" postCell="../ePop[1]" postSegment="0" postFractionAlong="0.5" preComponent="silent1" postComponent="rs" weight="-0.00132"/>
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        </continuousProjection>
        <continuousProjection id="pv_pv" presynapticPopulation="pvPop" postsynapticPopulation="pvPop">
            <continuousConnectionInstanceW id="0" preCell="../pvPop[0]" preSegment="0" preFractionAlong="0.5" postCell="../pvPop[0]" postSegment="0" postFractionAlong="0.5" preComponent="silent1" postComponent="rs" weight="-0.138"/>
            <continuousConnectionInstanceW id="1" preCell="../pvPop[0]" preSegment="0" preFractionAlong="0.5" postCell="../pvPop[1]" postSegment="0" postFractionAlong="0.5" preComponent="silent1" postComponent="rs" weight="-0.138"/>
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        </continuousProjection>
        <continuousProjection id="pv_sst" presynapticPopulation="pvPop" postsynapticPopulation="sstPop"/>
        <continuousProjection id="pv_vip" presynapticPopulation="pvPop" postsynapticPopulation="vipPop"/>
        <continuousProjection id="sst_e" presynapticPopulation="sstPop" postsynapticPopulation="ePop">
            <continuousConnectionInstanceW id="0" preCell="../sstPop[0]" preSegment="0" preFractionAlong="0.5" postCell="../ePop[0]" postSegment="0" postFractionAlong="0.5" preComponent="silent1" postComponent="rs" weight="-0.066666666666667"/>
            <continuousConnectionInstanceW id="1" preCell="../sstPop[0]" preSegment="0" preFractionAlong="0.5" postCell="../ePop[1]" postSegment="0" postFractionAlong="0.5" preComponent="silent1" postComponent="rs" weight="-0.066666666666667"/>
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        </continuousProjection>
        <continuousProjection id="sst_pv" presynapticPopulation="sstPop" postsynapticPopulation="pvPop">
            <continuousConnectionInstanceW id="0" preCell="../sstPop[0]" preSegment="0" preFractionAlong="0.5" postCell="../pvPop[0]" postSegment="0" postFractionAlong="0.5" preComponent="silent1" postComponent="rs" weight="0.208823529411765"/>
            <continuousConnectionInstanceW id="1" preCell="../sstPop[0]" preSegment="0" preFractionAlong="0.5" postCell="../pvPop[1]" postSegment="0" postFractionAlong="0.5" preComponent="silent1" postComponent="rs" weight="0.208823529411765"/>
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        </continuousProjection>
        <continuousProjection id="sst_sst" presynapticPopulation="sstPop" postsynapticPopulation="sstPop"/>
        <continuousProjection id="sst_vip" presynapticPopulation="sstPop" postsynapticPopulation="vipPop">
            <continuousConnectionInstanceW id="0" preCell="../sstPop[0]" preSegment="0" preFractionAlong="0.5" postCell="../vipPop[1]" postSegment="0" postFractionAlong="0.5" preComponent="silent1" postComponent="rs" weight="-0.026666666666667"/>
            <continuousConnectionInstanceW id="1" preCell="../sstPop[0]" preSegment="0" preFractionAlong="0.5" postCell="../vipPop[2]" postSegment="0" postFractionAlong="0.5" preComponent="silent1" postComponent="rs" weight="-0.026666666666667"/>
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        </continuousProjection>
        <continuousProjection id="vip_e" presynapticPopulation="vipPop" postsynapticPopulation="ePop"/>
        <continuousProjection id="vip_pv" presynapticPopulation="vipPop" postsynapticPopulation="pvPop"/>
        <continuousProjection id="vip_sst" presynapticPopulation="vipPop" postsynapticPopulation="sstPop">
            <continuousConnectionInstanceW id="0" preCell="../vipPop[0]" preSegment="0" preFractionAlong="0.5" postCell="../sstPop[1]" postSegment="0" postFractionAlong="0.5" preComponent="silent1" postComponent="rs" weight="-0.422727272727273"/>
            <continuousConnectionInstanceW id="1" preCell="../vipPop[0]" preSegment="0" preFractionAlong="0.5" postCell="../sstPop[3]" postSegment="0" postFractionAlong="0.5" preComponent="silent1" postComponent="rs" weight="-0.422727272727273"/>
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        </continuousProjection>
        <continuousProjection id="vip_vip" presynapticPopulation="vipPop" postsynapticPopulation="vipPop"/>
        <explicitInput target="ePop[0]" input="baseline_e" destination="synapses"/>
        <explicitInput target="ePop[1]" input="baseline_e" destination="synapses"/>
        <explicitInput target="ePop[2]" input="baseline_e" destination="synapses"/>
        <explicitInput target="ePop[3]" input="baseline_e" destination="synapses"/>
        <explicitInput target="ePop[4]" input="baseline_e" destination="synapses"/>
        <explicitInput target="ePop[5]" input="baseline_e" destination="synapses"/>
        <explicitInput target="ePop[6]" input="baseline_e" destination="synapses"/>
        <explicitInput target="ePop[7]" input="baseline_e" destination="synapses"/>
        <explicitInput target="ePop[8]" input="baseline_e" destination="synapses"/>
        <explicitInput target="ePop[9]" input="baseline_e" destination="synapses"/>
        <explicitInput target="ePop[10]" input="baseline_e" destination="synapses"/>
        <explicitInput target="ePop[11]" input="baseline_e" destination="synapses"/>
        <explicitInput target="ePop[12]" input="baseline_e" destination="synapses"/>
        <explicitInput target="ePop[13]" input="baseline_e" destination="synapses"/>
        <explicitInput target="ePop[14]" input="baseline_e" destination="synapses"/>
        <explicitInput target="ePop[15]" input="baseline_e" destination="synapses"/>
        <explicitInput target="ePop[16]" input="baseline_e" destination="synapses"/>
        <explicitInput target="ePop[17]" input="baseline_e" destination="synapses"/>
        <explicitInput target="ePop[18]" input="baseline_e" destination="synapses"/>
        <explicitInput target="ePop[19]" input="baseline_e" destination="synapses"/>
        <explicitInput target="ePop[20]" input="baseline_e" destination="synapses"/>
        <explicitInput target="ePop[21]" input="baseline_e" destination="synapses"/>
        <explicitInput target="ePop[22]" input="baseline_e" destination="synapses"/>
        <explicitInput target="ePop[23]" input="baseline_e" destination="synapses"/>
        <explicitInput target="ePop[24]" input="baseline_e" destination="synapses"/>
        <explicitInput target="ePop[25]" input="baseline_e" destination="synapses"/>
        <explicitInput target="ePop[26]" input="baseline_e" destination="synapses"/>
        <explicitInput target="ePop[27]" input="baseline_e" destination="synapses"/>
        <explicitInput target="ePop[28]" input="baseline_e" destination="synapses"/>
        <explicitInput target="ePop[29]" input="baseline_e" destination="synapses"/>
        <explicitInput target="ePop[30]" input="baseline_e" destination="synapses"/>
        <explicitInput target="ePop[31]" input="baseline_e" destination="synapses"/>
        <explicitInput target="ePop[32]" input="baseline_e" destination="synapses"/>
        <explicitInput target="ePop[33]" input="baseline_e" destination="synapses"/>
        <explicitInput target="ePop[34]" input="baseline_e" destination="synapses"/>
        <explicitInput target="ePop[35]" input="baseline_e" destination="synapses"/>
        <explicitInput target="ePop[36]" input="baseline_e" destination="synapses"/>
        <explicitInput target="ePop[37]" input="baseline_e" destination="synapses"/>
        <explicitInput target="ePop[38]" input="baseline_e" destination="synapses"/>
        <explicitInput target="ePop[39]" input="baseline_e" destination="synapses"/>
        <explicitInput target="ePop[40]" input="baseline_e" destination="synapses"/>
        <explicitInput target="ePop[41]" input="baseline_e" destination="synapses"/>
        <explicitInput target="ePop[42]" input="baseline_e" destination="synapses"/>
        <explicitInput target="ePop[43]" input="baseline_e" destination="synapses"/>
        <explicitInput target="ePop[44]" input="baseline_e" destination="synapses"/>
        <explicitInput target="ePop[45]" input="baseline_e" destination="synapses"/>
        <explicitInput target="ePop[46]" input="baseline_e" destination="synapses"/>
        <explicitInput target="ePop[47]" input="baseline_e" destination="synapses"/>
        <explicitInput target="ePop[48]" input="baseline_e" destination="synapses"/>
        <explicitInput target="ePop[49]" input="baseline_e" destination="synapses"/>
        <explicitInput target="ePop[50]" input="baseline_e" destination="synapses"/>
        <explicitInput target="ePop[51]" input="baseline_e" destination="synapses"/>
        <explicitInput target="ePop[52]" input="baseline_e" destination="synapses"/>
        <explicitInput target="ePop[53]" input="baseline_e" destination="synapses"/>
        <explicitInput target="ePop[54]" input="baseline_e" destination="synapses"/>
        <explicitInput target="ePop[55]" input="baseline_e" destination="synapses"/>
        <explicitInput target="ePop[56]" input="baseline_e" destination="synapses"/>
        <explicitInput target="ePop[57]" input="baseline_e" destination="synapses"/>
        <explicitInput target="ePop[58]" input="baseline_e" destination="synapses"/>
        <explicitInput target="ePop[59]" input="baseline_e" destination="synapses"/>
        <explicitInput target="ePop[60]" input="baseline_e" destination="synapses"/>
        <explicitInput target="ePop[61]" input="baseline_e" destination="synapses"/>
        <explicitInput target="ePop[62]" input="baseline_e" destination="synapses"/>
        <explicitInput target="ePop[63]" input="baseline_e" destination="synapses"/>
        <explicitInput target="ePop[64]" input="baseline_e" destination="synapses"/>
        <explicitInput target="ePop[65]" input="baseline_e" destination="synapses"/>
        <explicitInput target="ePop[66]" input="baseline_e" destination="synapses"/>
        <explicitInput target="ePop[67]" input="baseline_e" destination="synapses"/>
        <explicitInput target="ePop[68]" input="baseline_e" destination="synapses"/>
        <explicitInput target="ePop[69]" input="baseline_e" destination="synapses"/>
        <explicitInput target="ePop[70]" input="baseline_e" destination="synapses"/>
        <explicitInput target="ePop[71]" input="baseline_e" destination="synapses"/>
        <explicitInput target="ePop[72]" input="baseline_e" destination="synapses"/>
        <explicitInput target="ePop[73]" input="baseline_e" destination="synapses"/>
        <explicitInput target="ePop[74]" input="baseline_e" destination="synapses"/>
        <explicitInput target="ePop[75]" input="baseline_e" destination="synapses"/>
        <explicitInput target="ePop[76]" input="baseline_e" destination="synapses"/>
        <explicitInput target="ePop[77]" input="baseline_e" destination="synapses"/>
        <explicitInput target="ePop[78]" input="baseline_e" destination="synapses"/>
        <explicitInput target="ePop[79]" input="baseline_e" destination="synapses"/>
        <explicitInput target="ePop[80]" input="baseline_e" destination="synapses"/>
        <explicitInput target="ePop[81]" input="baseline_e" destination="synapses"/>
        <explicitInput target="ePop[82]" input="baseline_e" destination="synapses"/>
        <explicitInput target="ePop[83]" input="baseline_e" destination="synapses"/>
        <explicitInput target="ePop[84]" input="baseline_e" destination="synapses"/>
        <explicitInput target="ePop[85]" input="baseline_e" destination="synapses"/>
        <explicitInput target="ePop[86]" input="baseline_e" destination="synapses"/>
        <explicitInput target="ePop[87]" input="baseline_e" destination="synapses"/>
        <explicitInput target="ePop[88]" input="baseline_e" destination="synapses"/>
        <explicitInput target="ePop[89]" input="baseline_e" destination="synapses"/>
        <explicitInput target="ePop[90]" input="baseline_e" destination="synapses"/>
        <explicitInput target="ePop[91]" input="baseline_e" destination="synapses"/>
        <explicitInput target="ePop[92]" input="baseline_e" destination="synapses"/>
        <explicitInput target="ePop[93]" input="baseline_e" destination="synapses"/>
        <explicitInput target="ePop[94]" input="baseline_e" destination="synapses"/>
        <explicitInput target="ePop[95]" input="baseline_e" destination="synapses"/>
        <explicitInput target="ePop[96]" input="baseline_e" destination="synapses"/>
        <explicitInput target="ePop[97]" input="baseline_e" destination="synapses"/>
        <explicitInput target="ePop[98]" input="baseline_e" destination="synapses"/>
        <explicitInput target="ePop[99]" input="baseline_e" destination="synapses"/>
        <explicitInput target="ePop[100]" input="baseline_e" destination="synapses"/>
        <explicitInput target="ePop[101]" input="baseline_e" destination="synapses"/>
        <explicitInput target="ePop[102]" input="baseline_e" destination="synapses"/>
        <explicitInput target="ePop[103]" input="baseline_e" destination="synapses"/>
        <explicitInput target="ePop[104]" input="baseline_e" destination="synapses"/>
        <explicitInput target="ePop[105]" input="baseline_e" destination="synapses"/>
        <explicitInput target="ePop[106]" input="baseline_e" destination="synapses"/>
        <explicitInput target="ePop[107]" input="baseline_e" destination="synapses"/>
        <explicitInput target="ePop[108]" input="baseline_e" destination="synapses"/>
        <explicitInput target="ePop[109]" input="baseline_e" destination="synapses"/>
        <explicitInput target="ePop[110]" input="baseline_e" destination="synapses"/>
        <explicitInput target="ePop[111]" input="baseline_e" destination="synapses"/>
        <explicitInput target="ePop[112]" input="baseline_e" destination="synapses"/>
        <explicitInput target="ePop[113]" input="baseline_e" destination="synapses"/>
        <explicitInput target="ePop[114]" input="baseline_e" destination="synapses"/>
        <explicitInput target="ePop[115]" input="baseline_e" destination="synapses"/>
        <explicitInput target="ePop[116]" input="baseline_e" destination="synapses"/>
        <explicitInput target="ePop[117]" input="baseline_e" destination="synapses"/>
        <explicitInput target="ePop[118]" input="baseline_e" destination="synapses"/>
        <explicitInput target="ePop[119]" input="baseline_e" destination="synapses"/>
        <explicitInput target="ePop[120]" input="baseline_e" destination="synapses"/>
        <explicitInput target="ePop[121]" input="baseline_e" destination="synapses"/>
        <explicitInput target="ePop[122]" input="baseline_e" destination="synapses"/>
        <explicitInput target="ePop[123]" input="baseline_e" destination="synapses"/>
        <explicitInput target="ePop[124]" input="baseline_e" destination="synapses"/>
        <explicitInput target="ePop[125]" input="baseline_e" destination="synapses"/>
        <explicitInput target="ePop[126]" input="baseline_e" destination="synapses"/>
        <explicitInput target="ePop[127]" input="baseline_e" destination="synapses"/>
        <explicitInput target="ePop[128]" input="baseline_e" destination="synapses"/>
        <explicitInput target="ePop[129]" input="baseline_e" destination="synapses"/>
        <explicitInput target="ePop[130]" input="baseline_e" destination="synapses"/>
        <explicitInput target="ePop[131]" input="baseline_e" destination="synapses"/>
        <explicitInput target="ePop[132]" input="baseline_e" destination="synapses"/>
        <explicitInput target="ePop[133]" input="baseline_e" destination="synapses"/>
        <explicitInput target="ePop[134]" input="baseline_e" destination="synapses"/>
        <explicitInput target="ePop[135]" input="baseline_e" destination="synapses"/>
        <explicitInput target="ePop[136]" input="baseline_e" destination="synapses"/>
        <explicitInput target="ePop[137]" input="baseline_e" destination="synapses"/>
        <explicitInput target="ePop[138]" input="baseline_e" destination="synapses"/>
        <explicitInput target="ePop[139]" input="baseline_e" destination="synapses"/>
        <explicitInput target="ePop[140]" input="baseline_e" destination="synapses"/>
        <explicitInput target="ePop[141]" input="baseline_e" destination="synapses"/>
        <explicitInput target="ePop[142]" input="baseline_e" destination="synapses"/>
        <explicitInput target="ePop[143]" input="baseline_e" destination="synapses"/>
        <explicitInput target="ePop[144]" input="baseline_e" destination="synapses"/>
        <explicitInput target="ePop[145]" input="baseline_e" destination="synapses"/>
        <explicitInput target="ePop[146]" input="baseline_e" destination="synapses"/>
        <explicitInput target="ePop[147]" input="baseline_e" destination="synapses"/>
        <explicitInput target="ePop[148]" input="baseline_e" destination="synapses"/>
        <explicitInput target="ePop[149]" input="baseline_e" destination="synapses"/>
        <explicitInput target="ePop[150]" input="baseline_e" destination="synapses"/>
        <explicitInput target="ePop[151]" input="baseline_e" destination="synapses"/>
        <explicitInput target="ePop[152]" input="baseline_e" destination="synapses"/>
        <explicitInput target="ePop[153]" input="baseline_e" destination="synapses"/>
        <explicitInput target="ePop[154]" input="baseline_e" destination="synapses"/>
        <explicitInput target="ePop[155]" input="baseline_e" destination="synapses"/>
        <explicitInput target="ePop[156]" input="baseline_e" destination="synapses"/>
        <explicitInput target="ePop[157]" input="baseline_e" destination="synapses"/>
        <explicitInput target="ePop[158]" input="baseline_e" destination="synapses"/>
        <explicitInput target="ePop[159]" input="baseline_e" destination="synapses"/>
        <explicitInput target="ePop[160]" input="baseline_e" destination="synapses"/>
        <explicitInput target="ePop[161]" input="baseline_e" destination="synapses"/>
        <explicitInput target="ePop[162]" input="baseline_e" destination="synapses"/>
        <explicitInput target="ePop[163]" input="baseline_e" destination="synapses"/>
        <explicitInput target="ePop[164]" input="baseline_e" destination="synapses"/>
        <explicitInput target="ePop[165]" input="baseline_e" destination="synapses"/>
        <explicitInput target="ePop[166]" input="baseline_e" destination="synapses"/>
        <explicitInput target="ePop[167]" input="baseline_e" destination="synapses"/>
        <explicitInput target="ePop[168]" input="baseline_e" destination="synapses"/>
        <explicitInput target="ePop[169]" input="baseline_e" destination="synapses"/>
        <explicitInput target="ePop[170]" input="baseline_e" destination="synapses"/>
        <explicitInput target="ePop[171]" input="baseline_e" destination="synapses"/>
        <explicitInput target="ePop[172]" input="baseline_e" destination="synapses"/>
        <explicitInput target="ePop[173]" input="baseline_e" destination="synapses"/>
        <explicitInput target="ePop[174]" input="baseline_e" destination="synapses"/>
        <explicitInput target="ePop[175]" input="baseline_e" destination="synapses"/>
        <explicitInput target="ePop[176]" input="baseline_e" destination="synapses"/>
        <explicitInput target="ePop[177]" input="baseline_e" destination="synapses"/>
        <explicitInput target="ePop[178]" input="baseline_e" destination="synapses"/>
        <explicitInput target="ePop[179]" input="baseline_e" destination="synapses"/>
        <explicitInput target="ePop[180]" input="baseline_e" destination="synapses"/>
        <explicitInput target="ePop[181]" input="baseline_e" destination="synapses"/>
        <explicitInput target="ePop[182]" input="baseline_e" destination="synapses"/>
        <explicitInput target="ePop[183]" input="baseline_e" destination="synapses"/>
        <explicitInput target="ePop[184]" input="baseline_e" destination="synapses"/>
        <explicitInput target="ePop[185]" input="baseline_e" destination="synapses"/>
        <explicitInput target="ePop[186]" input="baseline_e" destination="synapses"/>
        <explicitInput target="ePop[187]" input="baseline_e" destination="synapses"/>
        <explicitInput target="ePop[188]" input="baseline_e" destination="synapses"/>
        <explicitInput target="ePop[189]" input="baseline_e" destination="synapses"/>
        <explicitInput target="ePop[190]" input="baseline_e" destination="synapses"/>
        <explicitInput target="ePop[191]" input="baseline_e" destination="synapses"/>
        <explicitInput target="ePop[192]" input="baseline_e" destination="synapses"/>
        <explicitInput target="ePop[193]" input="baseline_e" destination="synapses"/>
        <explicitInput target="ePop[194]" input="baseline_e" destination="synapses"/>
        <explicitInput target="ePop[195]" input="baseline_e" destination="synapses"/>
        <explicitInput target="ePop[196]" input="baseline_e" destination="synapses"/>
        <explicitInput target="ePop[197]" input="baseline_e" destination="synapses"/>
        <explicitInput target="ePop[198]" input="baseline_e" destination="synapses"/>
        <explicitInput target="ePop[199]" input="baseline_e" destination="synapses"/>
        <explicitInput target="pvPop[0]" input="baseline_pv" destination="synapses"/>
        <explicitInput target="pvPop[1]" input="baseline_pv" destination="synapses"/>
        <explicitInput target="pvPop[2]" input="baseline_pv" destination="synapses"/>
        <explicitInput target="pvPop[3]" input="baseline_pv" destination="synapses"/>
        <explicitInput target="pvPop[4]" input="baseline_pv" destination="synapses"/>
        <explicitInput target="pvPop[5]" input="baseline_pv" destination="synapses"/>
        <explicitInput target="pvPop[6]" input="baseline_pv" destination="synapses"/>
        <explicitInput target="pvPop[7]" input="baseline_pv" destination="synapses"/>
        <explicitInput target="pvPop[8]" input="baseline_pv" destination="synapses"/>
        <explicitInput target="pvPop[9]" input="baseline_pv" destination="synapses"/>
        <explicitInput target="pvPop[10]" input="baseline_pv" destination="synapses"/>
        <explicitInput target="pvPop[11]" input="baseline_pv" destination="synapses"/>
        <explicitInput target="pvPop[12]" input="baseline_pv" destination="synapses"/>
        <explicitInput target="pvPop[13]" input="baseline_pv" destination="synapses"/>
        <explicitInput target="pvPop[14]" input="baseline_pv" destination="synapses"/>
        <explicitInput target="pvPop[15]" input="baseline_pv" destination="synapses"/>
        <explicitInput target="pvPop[16]" input="baseline_pv" destination="synapses"/>
        <explicitInput target="pvPop[17]" input="baseline_pv" destination="synapses"/>
        <explicitInput target="pvPop[18]" input="baseline_pv" destination="synapses"/>
        <explicitInput target="pvPop[19]" input="baseline_pv" destination="synapses"/>
        <explicitInput target="pvPop[20]" input="baseline_pv" destination="synapses"/>
        <explicitInput target="pvPop[21]" input="baseline_pv" destination="synapses"/>
        <explicitInput target="pvPop[22]" input="baseline_pv" destination="synapses"/>
        <explicitInput target="pvPop[23]" input="baseline_pv" destination="synapses"/>
        <explicitInput target="pvPop[24]" input="baseline_pv" destination="synapses"/>
        <explicitInput target="sstPop[0]" input="baseline_sst" destination="synapses"/>
        <explicitInput target="sstPop[1]" input="baseline_sst" destination="synapses"/>
        <explicitInput target="sstPop[2]" input="baseline_sst" destination="synapses"/>
        <explicitInput target="sstPop[3]" input="baseline_sst" destination="synapses"/>
        <explicitInput target="sstPop[4]" input="baseline_sst" destination="synapses"/>
        <explicitInput target="sstPop[5]" input="baseline_sst" destination="synapses"/>
        <explicitInput target="sstPop[6]" input="baseline_sst" destination="synapses"/>
        <explicitInput target="sstPop[7]" input="baseline_sst" destination="synapses"/>
        <explicitInput target="sstPop[8]" input="baseline_sst" destination="synapses"/>
        <explicitInput target="sstPop[9]" input="baseline_sst" destination="synapses"/>
        <explicitInput target="sstPop[10]" input="baseline_sst" destination="synapses"/>
        <explicitInput target="sstPop[11]" input="baseline_sst" destination="synapses"/>
        <explicitInput target="vipPop[0]" input="baseline_vip" destination="synapses"/>
        <explicitInput target="vipPop[0]" input="modVIP" destination="synapses"/>
        <explicitInput target="vipPop[1]" input="baseline_vip" destination="synapses"/>
        <explicitInput target="vipPop[1]" input="modVIP" destination="synapses"/>
        <explicitInput target="vipPop[2]" input="baseline_vip" destination="synapses"/>
        <explicitInput target="vipPop[2]" input="modVIP" destination="synapses"/>
        <explicitInput target="vipPop[3]" input="baseline_vip" destination="synapses"/>
        <explicitInput target="vipPop[3]" input="modVIP" destination="synapses"/>
        <explicitInput target="vipPop[4]" input="baseline_vip" destination="synapses"/>
        <explicitInput target="vipPop[4]" input="modVIP" destination="synapses"/>
        <explicitInput target="vipPop[5]" input="baseline_vip" destination="synapses"/>
        <explicitInput target="vipPop[5]" input="modVIP" destination="synapses"/>
        <explicitInput target="vipPop[6]" input="baseline_vip" destination="synapses"/>
        <explicitInput target="vipPop[6]" input="modVIP" destination="synapses"/>
        <explicitInput target="vipPop[7]" input="baseline_vip" destination="synapses"/>
        <explicitInput target="vipPop[7]" input="modVIP" destination="synapses"/>
        <explicitInput target="vipPop[8]" input="baseline_vip" destination="synapses"/>
        <explicitInput target="vipPop[8]" input="modVIP" destination="synapses"/>
        <explicitInput target="vipPop[9]" input="baseline_vip" destination="synapses"/>
        <explicitInput target="vipPop[9]" input="modVIP" destination="synapses"/>
        <explicitInput target="vipPop[10]" input="baseline_vip" destination="synapses"/>
        <explicitInput target="vipPop[10]" input="modVIP" destination="synapses"/>
        <explicitInput target="vipPop[11]" input="baseline_vip" destination="synapses"/>
        <explicitInput target="vipPop[11]" input="modVIP" destination="synapses"/>
    </network>
</neuroml>
